solve block
    # guess values
    p := 0.75
    π1 := 0.7
    π2 := 0.65
    P_0000 := 0
    P_0001 := 0
    P_0100 := 0
    P_0101 := 0
    P_1101 := 0
    P_1111 := 0
    P_0111 := 0
    P_1121 := 0
    P_0011 := 0
    P_1100 := 0
    P_0021 := 0
    P_0121 := 0
    # constraints
    P_0000 == p*P_0000 + p*(1 - π2)*P_0001
    P_0001 == p*π2*P_0001 + p*(1 - π2)*P_0011 + p*(1 - π1)*(1 - π2)*P_0101 + p*(1 - π1)*P_0100
    P_0101 == (p*π1*π2 + (1 - p)*(1 - π1)*(1 - π2))*P_0101 + (1 - p)*(1 - π2)*P_0011 + (1 - π1)*P_1100 + p*π1*(1 - π2)*P_0111 + (1 - p)*(1 - π1)*P_0100 + (1 - p)*π2*P_0001 + (1 - π1)*(1 - π2)*P_1101
    P_1101 == π1*π2*P_1101 + π1*(1 - π2)*P_1111 + (1 - p)*π1*π2*P_0101 + (1 - p)*π1*(1 - π2)*P_0111
    P_1111 == π1*π2*P_1111 + π1*(1 - π2)*P_1121 + (1 - p)*π1*(1 - π2)*P_0121 + (1 - p)*π1*π2*P_0111
    P_1121 == π1*π2*P_1121 + (1 - p)*π1*π2*P_0121
    P_0011 == p*π2*P_0011 + p*(1 - π1)*(1 - π2)*P_0111 + p*(1 - π1)*π2*P_0101 + p*(1 - π2)*P_0021
    P_1100 == π1*P_1100 + π1*(1 - π2)*P_1101 + (1 - p)*π1*P_0100 + (1 - p)*π1*(1 - π2)*P_0101
    P_0021 == p*π2*P_0021 + p*(1 - π1)*π2*P_0111 + (p*(1 - π1)*π2 + p*(1 - π1)*(1 - π2))*P_0121
    P_0121 == (p*π1*π2 + (1 - p)*(1 - π1)*π2 + (1 - p)*(1 - π1)*(1 - π2))*P_0121 + ((1 - π1)*π2 + (1 - π1)*(1 - π2))*P_1121 + (1 - p)*(1 - π1)*π2*P_0111 + (1 - π1)*π2*P_1111 + (1 - p)*π2*P_0021
    P_0100 == p*π1*P_0100 + (1 - p)*(1 - π2)*P_0001 + p*π1*(1 - π2)*P_0101 + (1 - p)*P_0000
    1 == P_0000 + P_0100 + P_0001 + P_0101 + P_1101 + P_0111 + P_1111 + P_1121 + P_0011 + P_1100 + P_0021 + P_0121
    # solver
    [P_0000; P_0001; P_0011; P_0100; P_0101; P_0111; P_0021; P_0121; P_1100; P_1101; P_1111; P_1121] := find(P_0000, P_0001, P_0011, P_0100, P_0101, P_0111, P_0021, P_0121, P_1100, P_1101, P_1111, P_1121) = [0.137954; 0.131385; 0.0686329; 0.161062; 0.166093; 0.0567208; 0.0244439; 0.0188092; 0.16715; 0.0481063; 0.0157172; 0.00392577]
    L_q := P_0011 + P_0111 + P_0021 + P_0121 + P_1111 + P_1121
    L_q = 0.18825
    A := (1 - π2)*(P_0001 + P_0011 + P_0101 + P_0111 + P_0021 + P_0121 + P_1101 + P_1111 + P_1121)
    A = 0.186842
    W_q := L_q/A
    W_q = 1.00754
end solve block
